<neuroml xmlns="http://www.neuroml.org/schema/neuroml2"  xmlns:xs="http://www.w3.org/2001/XMLSchema" xmlns:xsi="http://www.w3.org/2001/XMLSchema-instance" xsi:schemaLocation="http://www.neuroml.org/schema/neuroml2 https://raw.github.com/NeuroML/NeuroML2/development/Schemas/NeuroML2/NeuroML_v2beta5.xsd" id="RandomPopulation">
    <silentSynapse id="silent1"/>
    <pulseGenerator id="baseline_e" delay="0ms" duration="300ms" amplitude="115.03 pA"/>
    <pulseGenerator id="baseline_pv" delay="0ms" duration="300ms" amplitude="233.66 pA"/>
    <pulseGenerator id="baseline_sst" delay="0ms" duration="300ms" amplitude="94.31 pA"/>
    <pulseGenerator id="baseline_vip" delay="0ms" duration="300ms" amplitude="89.91 pA"/>
    <pulseGenerator id="modVIP" delay="100ms" duration="200ms" amplitude="10 pA"/>
    <network id="net2">
        <population id="ePop" component="E" size="200" type="populationList">
            <instance id="0">
                <location x="57.149558341700001" y="53.340228395499999" z="51.0137483038"/>
            </instance>
            <instance id="1">
                <location x="65.705977374499994" y="22.766326426100001" z="79.050387339300002"/>
            </instance>
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        </population>
        <population id="pvPop" component="PV" size="25" type="populationList">
            <instance id="0">
                <location x="48.579757418600003" y="61.344060058799997" z="26.7711216505"/>
            </instance>
            <instance id="1">
                <location x="28.263419149400001" y="99.778848831100007" z="45.771366411700001"/>
            </instance>
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        </population>
        <population id="sstPop" component="SST" size="12" type="populationList">
            <instance id="0">
                <location x="52.532943698300002" y="84.776519013400005" z="5.43936103385"/>
            </instance>
            <instance id="1">
                <location x="14.4234591824" y="75.188454999200005" z="47.105753152299997"/>
            </instance>
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        </population>
        <population id="vipPop" component="VIP" size="12" type="populationList">
            <instance id="0">
                <location x="30.418014194800001" y="79.775703042800004" z="57.0103678065"/>
            </instance>
            <instance id="1">
                <location x="31.057820592999999" y="84.809255060200002" z="71.585719951200005"/>
            </instance>
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        </population>
        <continuousProjection id="e_e" presynapticPopulation="ePop" postsynapticPopulation="ePop">
            <continuousConnectionInstanceW id="0" preCell="../ePop/0/E" postCell="../ePop/25/E" preComponent="silent1" postComponent="rs" weight="0.605"/>
            <continuousConnectionInstanceW id="1" preCell="../ePop/0/E" postCell="../ePop/74/E" preComponent="silent1" postComponent="rs" weight="0.605"/>
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        </continuousProjection>
        <continuousProjection id="e_pv" presynapticPopulation="ePop" postsynapticPopulation="pvPop">
            <continuousConnectionInstanceW id="0" preCell="../ePop/4/E" postCell="../pvPop/18/PV" preComponent="silent1" postComponent="rs" weight="1.485"/>
            <continuousConnectionInstanceW id="1" preCell="../ePop/7/E" postCell="../pvPop/19/PV" preComponent="silent1" postComponent="rs" weight="1.485"/>
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        </continuousProjection>
        <continuousProjection id="e_sst" presynapticPopulation="ePop" postsynapticPopulation="sstPop">
            <continuousConnectionInstanceW id="0" preCell="../ePop/22/E" postCell="../sstPop/8/SST" preComponent="silent1" postComponent="rs" weight="2.32"/>
            <continuousConnectionInstanceW id="1" preCell="../ePop/37/E" postCell="../sstPop/5/SST" preComponent="silent1" postComponent="rs" weight="2.32"/>
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        </continuousProjection>
        <continuousProjection id="e_vip" presynapticPopulation="ePop" postsynapticPopulation="vipPop">
            <continuousConnectionInstanceW id="0" preCell="../ePop/3/E" postCell="../vipPop/10/VIP" preComponent="silent1" postComponent="rs" weight="0.355"/>
            <continuousConnectionInstanceW id="1" preCell="../ePop/4/E" postCell="../vipPop/7/VIP" preComponent="silent1" postComponent="rs" weight="0.355"/>
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        </continuousProjection>
        <continuousProjection id="pv_e" presynapticPopulation="pvPop" postsynapticPopulation="ePop">
            <continuousConnectionInstanceW id="0" preCell="../pvPop/0/PV" postCell="../ePop/0/E" preComponent="silent1" postComponent="rs" weight="-0.00132"/>
            <continuousConnectionInstanceW id="1" preCell="../pvPop/0/PV" postCell="../ePop/1/E" preComponent="silent1" postComponent="rs" weight="-0.00132"/>
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        </continuousProjection>
        <continuousProjection id="pv_pv" presynapticPopulation="pvPop" postsynapticPopulation="pvPop">
            <continuousConnectionInstanceW id="0" preCell="../pvPop/0/PV" postCell="../pvPop/0/PV" preComponent="silent1" postComponent="rs" weight="-0.138"/>
            <continuousConnectionInstanceW id="1" preCell="../pvPop/0/PV" postCell="../pvPop/1/PV" preComponent="silent1" postComponent="rs" weight="-0.138"/>
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        </continuousProjection>
        <continuousProjection id="pv_sst" presynapticPopulation="pvPop" postsynapticPopulation="sstPop"/>
        <continuousProjection id="pv_vip" presynapticPopulation="pvPop" postsynapticPopulation="vipPop"/>
        <continuousProjection id="sst_e" presynapticPopulation="sstPop" postsynapticPopulation="ePop">
            <continuousConnectionInstanceW id="0" preCell="../sstPop/0/SST" postCell="../ePop/0/E" preComponent="silent1" postComponent="rs" weight="-0.066666666666667"/>
            <continuousConnectionInstanceW id="1" preCell="../sstPop/0/SST" postCell="../ePop/1/E" preComponent="silent1" postComponent="rs" weight="-0.066666666666667"/>
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        </continuousProjection>
        <continuousProjection id="sst_pv" presynapticPopulation="sstPop" postsynapticPopulation="pvPop">
            <continuousConnectionInstanceW id="0" preCell="../sstPop/0/SST" postCell="../pvPop/0/PV" preComponent="silent1" postComponent="rs" weight="0.208823529411765"/>
            <continuousConnectionInstanceW id="1" preCell="../sstPop/0/SST" postCell="../pvPop/1/PV" preComponent="silent1" postComponent="rs" weight="0.208823529411765"/>
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        </continuousProjection>
        <continuousProjection id="sst_sst" presynapticPopulation="sstPop" postsynapticPopulation="sstPop"/>
        <continuousProjection id="sst_vip" presynapticPopulation="sstPop" postsynapticPopulation="vipPop">
            <continuousConnectionInstanceW id="0" preCell="../sstPop/0/SST" postCell="../vipPop/0/VIP" preComponent="silent1" postComponent="rs" weight="-0.026666666666667"/>
            <continuousConnectionInstanceW id="1" preCell="../sstPop/0/SST" postCell="../vipPop/3/VIP" preComponent="silent1" postComponent="rs" weight="-0.026666666666667"/>
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        </continuousProjection>
        <continuousProjection id="vip_e" presynapticPopulation="vipPop" postsynapticPopulation="ePop"/>
        <continuousProjection id="vip_pv" presynapticPopulation="vipPop" postsynapticPopulation="pvPop"/>
        <continuousProjection id="vip_sst" presynapticPopulation="vipPop" postsynapticPopulation="sstPop">
            <continuousConnectionInstanceW id="0" preCell="../vipPop/0/VIP" postCell="../sstPop/0/SST" preComponent="silent1" postComponent="rs" weight="-0.422727272727273"/>
            <continuousConnectionInstanceW id="1" preCell="../vipPop/0/VIP" postCell="../sstPop/2/SST" preComponent="silent1" postComponent="rs" weight="-0.422727272727273"/>
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        </continuousProjection>
        <continuousProjection id="vip_vip" presynapticPopulation="vipPop" postsynapticPopulation="vipPop"/>
        <explicitInput target="ePop/0/E" input="baseline_e" destination="synapses"/>
        <explicitInput target="ePop/1/E" input="baseline_e" destination="synapses"/>
        <explicitInput target="ePop/2/E" input="baseline_e" destination="synapses"/>
        <explicitInput target="ePop/3/E" input="baseline_e" destination="synapses"/>
        <explicitInput target="ePop/4/E" input="baseline_e" destination="synapses"/>
        <explicitInput target="ePop/5/E" input="baseline_e" destination="synapses"/>
        <explicitInput target="ePop/6/E" input="baseline_e" destination="synapses"/>
        <explicitInput target="ePop/7/E" input="baseline_e" destination="synapses"/>
        <explicitInput target="ePop/8/E" input="baseline_e" destination="synapses"/>
        <explicitInput target="ePop/9/E" input="baseline_e" destination="synapses"/>
        <explicitInput target="ePop/10/E" input="baseline_e" destination="synapses"/>
        <explicitInput target="ePop/11/E" input="baseline_e" destination="synapses"/>
        <explicitInput target="ePop/12/E" input="baseline_e" destination="synapses"/>
        <explicitInput target="ePop/13/E" input="baseline_e" destination="synapses"/>
        <explicitInput target="ePop/14/E" input="baseline_e" destination="synapses"/>
        <explicitInput target="ePop/15/E" input="baseline_e" destination="synapses"/>
        <explicitInput target="ePop/16/E" input="baseline_e" destination="synapses"/>
        <explicitInput target="ePop/17/E" input="baseline_e" destination="synapses"/>
        <explicitInput target="ePop/18/E" input="baseline_e" destination="synapses"/>
        <explicitInput target="ePop/19/E" input="baseline_e" destination="synapses"/>
        <explicitInput target="ePop/20/E" input="baseline_e" destination="synapses"/>
        <explicitInput target="ePop/21/E" input="baseline_e" destination="synapses"/>
        <explicitInput target="ePop/22/E" input="baseline_e" destination="synapses"/>
        <explicitInput target="ePop/23/E" input="baseline_e" destination="synapses"/>
        <explicitInput target="ePop/24/E" input="baseline_e" destination="synapses"/>
        <explicitInput target="ePop/25/E" input="baseline_e" destination="synapses"/>
        <explicitInput target="ePop/26/E" input="baseline_e" destination="synapses"/>
        <explicitInput target="ePop/27/E" input="baseline_e" destination="synapses"/>
        <explicitInput target="ePop/28/E" input="baseline_e" destination="synapses"/>
        <explicitInput target="ePop/29/E" input="baseline_e" destination="synapses"/>
        <explicitInput target="ePop/30/E" input="baseline_e" destination="synapses"/>
        <explicitInput target="ePop/31/E" input="baseline_e" destination="synapses"/>
        <explicitInput target="ePop/32/E" input="baseline_e" destination="synapses"/>
        <explicitInput target="ePop/33/E" input="baseline_e" destination="synapses"/>
        <explicitInput target="ePop/34/E" input="baseline_e" destination="synapses"/>
        <explicitInput target="ePop/35/E" input="baseline_e" destination="synapses"/>
        <explicitInput target="ePop/36/E" input="baseline_e" destination="synapses"/>
        <explicitInput target="ePop/37/E" input="baseline_e" destination="synapses"/>
        <explicitInput target="ePop/38/E" input="baseline_e" destination="synapses"/>
        <explicitInput target="ePop/39/E" input="baseline_e" destination="synapses"/>
        <explicitInput target="ePop/40/E" input="baseline_e" destination="synapses"/>
        <explicitInput target="ePop/41/E" input="baseline_e" destination="synapses"/>
        <explicitInput target="ePop/42/E" input="baseline_e" destination="synapses"/>
        <explicitInput target="ePop/43/E" input="baseline_e" destination="synapses"/>
        <explicitInput target="ePop/44/E" input="baseline_e" destination="synapses"/>
        <explicitInput target="ePop/45/E" input="baseline_e" destination="synapses"/>
        <explicitInput target="ePop/46/E" input="baseline_e" destination="synapses"/>
        <explicitInput target="ePop/47/E" input="baseline_e" destination="synapses"/>
        <explicitInput target="ePop/48/E" input="baseline_e" destination="synapses"/>
        <explicitInput target="ePop/49/E" input="baseline_e" destination="synapses"/>
        <explicitInput target="ePop/50/E" input="baseline_e" destination="synapses"/>
        <explicitInput target="ePop/51/E" input="baseline_e" destination="synapses"/>
        <explicitInput target="ePop/52/E" input="baseline_e" destination="synapses"/>
        <explicitInput target="ePop/53/E" input="baseline_e" destination="synapses"/>
        <explicitInput target="ePop/54/E" input="baseline_e" destination="synapses"/>
        <explicitInput target="ePop/55/E" input="baseline_e" destination="synapses"/>
        <explicitInput target="ePop/56/E" input="baseline_e" destination="synapses"/>
        <explicitInput target="ePop/57/E" input="baseline_e" destination="synapses"/>
        <explicitInput target="ePop/58/E" input="baseline_e" destination="synapses"/>
        <explicitInput target="ePop/59/E" input="baseline_e" destination="synapses"/>
        <explicitInput target="ePop/60/E" input="baseline_e" destination="synapses"/>
        <explicitInput target="ePop/61/E" input="baseline_e" destination="synapses"/>
        <explicitInput target="ePop/62/E" input="baseline_e" destination="synapses"/>
        <explicitInput target="ePop/63/E" input="baseline_e" destination="synapses"/>
        <explicitInput target="ePop/64/E" input="baseline_e" destination="synapses"/>
        <explicitInput target="ePop/65/E" input="baseline_e" destination="synapses"/>
        <explicitInput target="ePop/66/E" input="baseline_e" destination="synapses"/>
        <explicitInput target="ePop/67/E" input="baseline_e" destination="synapses"/>
        <explicitInput target="ePop/68/E" input="baseline_e" destination="synapses"/>
        <explicitInput target="ePop/69/E" input="baseline_e" destination="synapses"/>
        <explicitInput target="ePop/70/E" input="baseline_e" destination="synapses"/>
        <explicitInput target="ePop/71/E" input="baseline_e" destination="synapses"/>
        <explicitInput target="ePop/72/E" input="baseline_e" destination="synapses"/>
        <explicitInput target="ePop/73/E" input="baseline_e" destination="synapses"/>
        <explicitInput target="ePop/74/E" input="baseline_e" destination="synapses"/>
        <explicitInput target="ePop/75/E" input="baseline_e" destination="synapses"/>
        <explicitInput target="ePop/76/E" input="baseline_e" destination="synapses"/>
        <explicitInput target="ePop/77/E" input="baseline_e" destination="synapses"/>
        <explicitInput target="ePop/78/E" input="baseline_e" destination="synapses"/>
        <explicitInput target="ePop/79/E" input="baseline_e" destination="synapses"/>
        <explicitInput target="ePop/80/E" input="baseline_e" destination="synapses"/>
        <explicitInput target="ePop/81/E" input="baseline_e" destination="synapses"/>
        <explicitInput target="ePop/82/E" input="baseline_e" destination="synapses"/>
        <explicitInput target="ePop/83/E" input="baseline_e" destination="synapses"/>
        <explicitInput target="ePop/84/E" input="baseline_e" destination="synapses"/>
        <explicitInput target="ePop/85/E" input="baseline_e" destination="synapses"/>
        <explicitInput target="ePop/86/E" input="baseline_e" destination="synapses"/>
        <explicitInput target="ePop/87/E" input="baseline_e" destination="synapses"/>
        <explicitInput target="ePop/88/E" input="baseline_e" destination="synapses"/>
        <explicitInput target="ePop/89/E" input="baseline_e" destination="synapses"/>
        <explicitInput target="ePop/90/E" input="baseline_e" destination="synapses"/>
        <explicitInput target="ePop/91/E" input="baseline_e" destination="synapses"/>
        <explicitInput target="ePop/92/E" input="baseline_e" destination="synapses"/>
        <explicitInput target="ePop/93/E" input="baseline_e" destination="synapses"/>
        <explicitInput target="ePop/94/E" input="baseline_e" destination="synapses"/>
        <explicitInput target="ePop/95/E" input="baseline_e" destination="synapses"/>
        <explicitInput target="ePop/96/E" input="baseline_e" destination="synapses"/>
        <explicitInput target="ePop/97/E" input="baseline_e" destination="synapses"/>
        <explicitInput target="ePop/98/E" input="baseline_e" destination="synapses"/>
        <explicitInput target="ePop/99/E" input="baseline_e" destination="synapses"/>
        <explicitInput target="ePop/100/E" input="baseline_e" destination="synapses"/>
        <explicitInput target="ePop/101/E" input="baseline_e" destination="synapses"/>
        <explicitInput target="ePop/102/E" input="baseline_e" destination="synapses"/>
        <explicitInput target="ePop/103/E" input="baseline_e" destination="synapses"/>
        <explicitInput target="ePop/104/E" input="baseline_e" destination="synapses"/>
        <explicitInput target="ePop/105/E" input="baseline_e" destination="synapses"/>
        <explicitInput target="ePop/106/E" input="baseline_e" destination="synapses"/>
        <explicitInput target="ePop/107/E" input="baseline_e" destination="synapses"/>
        <explicitInput target="ePop/108/E" input="baseline_e" destination="synapses"/>
        <explicitInput target="ePop/109/E" input="baseline_e" destination="synapses"/>
        <explicitInput target="ePop/110/E" input="baseline_e" destination="synapses"/>
        <explicitInput target="ePop/111/E" input="baseline_e" destination="synapses"/>
        <explicitInput target="ePop/112/E" input="baseline_e" destination="synapses"/>
        <explicitInput target="ePop/113/E" input="baseline_e" destination="synapses"/>
        <explicitInput target="ePop/114/E" input="baseline_e" destination="synapses"/>
        <explicitInput target="ePop/115/E" input="baseline_e" destination="synapses"/>
        <explicitInput target="ePop/116/E" input="baseline_e" destination="synapses"/>
        <explicitInput target="ePop/117/E" input="baseline_e" destination="synapses"/>
        <explicitInput target="ePop/118/E" input="baseline_e" destination="synapses"/>
        <explicitInput target="ePop/119/E" input="baseline_e" destination="synapses"/>
        <explicitInput target="ePop/120/E" input="baseline_e" destination="synapses"/>
        <explicitInput target="ePop/121/E" input="baseline_e" destination="synapses"/>
        <explicitInput target="ePop/122/E" input="baseline_e" destination="synapses"/>
        <explicitInput target="ePop/123/E" input="baseline_e" destination="synapses"/>
        <explicitInput target="ePop/124/E" input="baseline_e" destination="synapses"/>
        <explicitInput target="ePop/125/E" input="baseline_e" destination="synapses"/>
        <explicitInput target="ePop/126/E" input="baseline_e" destination="synapses"/>
        <explicitInput target="ePop/127/E" input="baseline_e" destination="synapses"/>
        <explicitInput target="ePop/128/E" input="baseline_e" destination="synapses"/>
        <explicitInput target="ePop/129/E" input="baseline_e" destination="synapses"/>
        <explicitInput target="ePop/130/E" input="baseline_e" destination="synapses"/>
        <explicitInput target="ePop/131/E" input="baseline_e" destination="synapses"/>
        <explicitInput target="ePop/132/E" input="baseline_e" destination="synapses"/>
        <explicitInput target="ePop/133/E" input="baseline_e" destination="synapses"/>
        <explicitInput target="ePop/134/E" input="baseline_e" destination="synapses"/>
        <explicitInput target="ePop/135/E" input="baseline_e" destination="synapses"/>
        <explicitInput target="ePop/136/E" input="baseline_e" destination="synapses"/>
        <explicitInput target="ePop/137/E" input="baseline_e" destination="synapses"/>
        <explicitInput target="ePop/138/E" input="baseline_e" destination="synapses"/>
        <explicitInput target="ePop/139/E" input="baseline_e" destination="synapses"/>
        <explicitInput target="ePop/140/E" input="baseline_e" destination="synapses"/>
        <explicitInput target="ePop/141/E" input="baseline_e" destination="synapses"/>
        <explicitInput target="ePop/142/E" input="baseline_e" destination="synapses"/>
        <explicitInput target="ePop/143/E" input="baseline_e" destination="synapses"/>
        <explicitInput target="ePop/144/E" input="baseline_e" destination="synapses"/>
        <explicitInput target="ePop/145/E" input="baseline_e" destination="synapses"/>
        <explicitInput target="ePop/146/E" input="baseline_e" destination="synapses"/>
        <explicitInput target="ePop/147/E" input="baseline_e" destination="synapses"/>
        <explicitInput target="ePop/148/E" input="baseline_e" destination="synapses"/>
        <explicitInput target="ePop/149/E" input="baseline_e" destination="synapses"/>
        <explicitInput target="ePop/150/E" input="baseline_e" destination="synapses"/>
        <explicitInput target="ePop/151/E" input="baseline_e" destination="synapses"/>
        <explicitInput target="ePop/152/E" input="baseline_e" destination="synapses"/>
        <explicitInput target="ePop/153/E" input="baseline_e" destination="synapses"/>
        <explicitInput target="ePop/154/E" input="baseline_e" destination="synapses"/>
        <explicitInput target="ePop/155/E" input="baseline_e" destination="synapses"/>
        <explicitInput target="ePop/156/E" input="baseline_e" destination="synapses"/>
        <explicitInput target="ePop/157/E" input="baseline_e" destination="synapses"/>
        <explicitInput target="ePop/158/E" input="baseline_e" destination="synapses"/>
        <explicitInput target="ePop/159/E" input="baseline_e" destination="synapses"/>
        <explicitInput target="ePop/160/E" input="baseline_e" destination="synapses"/>
        <explicitInput target="ePop/161/E" input="baseline_e" destination="synapses"/>
        <explicitInput target="ePop/162/E" input="baseline_e" destination="synapses"/>
        <explicitInput target="ePop/163/E" input="baseline_e" destination="synapses"/>
        <explicitInput target="ePop/164/E" input="baseline_e" destination="synapses"/>
        <explicitInput target="ePop/165/E" input="baseline_e" destination="synapses"/>
        <explicitInput target="ePop/166/E" input="baseline_e" destination="synapses"/>
        <explicitInput target="ePop/167/E" input="baseline_e" destination="synapses"/>
        <explicitInput target="ePop/168/E" input="baseline_e" destination="synapses"/>
        <explicitInput target="ePop/169/E" input="baseline_e" destination="synapses"/>
        <explicitInput target="ePop/170/E" input="baseline_e" destination="synapses"/>
        <explicitInput target="ePop/171/E" input="baseline_e" destination="synapses"/>
        <explicitInput target="ePop/172/E" input="baseline_e" destination="synapses"/>
        <explicitInput target="ePop/173/E" input="baseline_e" destination="synapses"/>
        <explicitInput target="ePop/174/E" input="baseline_e" destination="synapses"/>
        <explicitInput target="ePop/175/E" input="baseline_e" destination="synapses"/>
        <explicitInput target="ePop/176/E" input="baseline_e" destination="synapses"/>
        <explicitInput target="ePop/177/E" input="baseline_e" destination="synapses"/>
        <explicitInput target="ePop/178/E" input="baseline_e" destination="synapses"/>
        <explicitInput target="ePop/179/E" input="baseline_e" destination="synapses"/>
        <explicitInput target="ePop/180/E" input="baseline_e" destination="synapses"/>
        <explicitInput target="ePop/181/E" input="baseline_e" destination="synapses"/>
        <explicitInput target="ePop/182/E" input="baseline_e" destination="synapses"/>
        <explicitInput target="ePop/183/E" input="baseline_e" destination="synapses"/>
        <explicitInput target="ePop/184/E" input="baseline_e" destination="synapses"/>
        <explicitInput target="ePop/185/E" input="baseline_e" destination="synapses"/>
        <explicitInput target="ePop/186/E" input="baseline_e" destination="synapses"/>
        <explicitInput target="ePop/187/E" input="baseline_e" destination="synapses"/>
        <explicitInput target="ePop/188/E" input="baseline_e" destination="synapses"/>
        <explicitInput target="ePop/189/E" input="baseline_e" destination="synapses"/>
        <explicitInput target="ePop/190/E" input="baseline_e" destination="synapses"/>
        <explicitInput target="ePop/191/E" input="baseline_e" destination="synapses"/>
        <explicitInput target="ePop/192/E" input="baseline_e" destination="synapses"/>
        <explicitInput target="ePop/193/E" input="baseline_e" destination="synapses"/>
        <explicitInput target="ePop/194/E" input="baseline_e" destination="synapses"/>
        <explicitInput target="ePop/195/E" input="baseline_e" destination="synapses"/>
        <explicitInput target="ePop/196/E" input="baseline_e" destination="synapses"/>
        <explicitInput target="ePop/197/E" input="baseline_e" destination="synapses"/>
        <explicitInput target="ePop/198/E" input="baseline_e" destination="synapses"/>
        <explicitInput target="ePop/199/E" input="baseline_e" destination="synapses"/>
        <explicitInput target="pvPop/0/PV" input="baseline_pv" destination="synapses"/>
        <explicitInput target="pvPop/1/PV" input="baseline_pv" destination="synapses"/>
        <explicitInput target="pvPop/2/PV" input="baseline_pv" destination="synapses"/>
        <explicitInput target="pvPop/3/PV" input="baseline_pv" destination="synapses"/>
        <explicitInput target="pvPop/4/PV" input="baseline_pv" destination="synapses"/>
        <explicitInput target="pvPop/5/PV" input="baseline_pv" destination="synapses"/>
        <explicitInput target="pvPop/6/PV" input="baseline_pv" destination="synapses"/>
        <explicitInput target="pvPop/7/PV" input="baseline_pv" destination="synapses"/>
        <explicitInput target="pvPop/8/PV" input="baseline_pv" destination="synapses"/>
        <explicitInput target="pvPop/9/PV" input="baseline_pv" destination="synapses"/>
        <explicitInput target="pvPop/10/PV" input="baseline_pv" destination="synapses"/>
        <explicitInput target="pvPop/11/PV" input="baseline_pv" destination="synapses"/>
        <explicitInput target="pvPop/12/PV" input="baseline_pv" destination="synapses"/>
        <explicitInput target="pvPop/13/PV" input="baseline_pv" destination="synapses"/>
        <explicitInput target="pvPop/14/PV" input="baseline_pv" destination="synapses"/>
        <explicitInput target="pvPop/15/PV" input="baseline_pv" destination="synapses"/>
        <explicitInput target="pvPop/16/PV" input="baseline_pv" destination="synapses"/>
        <explicitInput target="pvPop/17/PV" input="baseline_pv" destination="synapses"/>
        <explicitInput target="pvPop/18/PV" input="baseline_pv" destination="synapses"/>
        <explicitInput target="pvPop/19/PV" input="baseline_pv" destination="synapses"/>
        <explicitInput target="pvPop/20/PV" input="baseline_pv" destination="synapses"/>
        <explicitInput target="pvPop/21/PV" input="baseline_pv" destination="synapses"/>
        <explicitInput target="pvPop/22/PV" input="baseline_pv" destination="synapses"/>
        <explicitInput target="pvPop/23/PV" input="baseline_pv" destination="synapses"/>
        <explicitInput target="pvPop/24/PV" input="baseline_pv" destination="synapses"/>
        <explicitInput target="sstPop/0/SST" input="baseline_sst" destination="synapses"/>
        <explicitInput target="sstPop/1/SST" input="baseline_sst" destination="synapses"/>
        <explicitInput target="sstPop/2/SST" input="baseline_sst" destination="synapses"/>
        <explicitInput target="sstPop/3/SST" input="baseline_sst" destination="synapses"/>
        <explicitInput target="sstPop/4/SST" input="baseline_sst" destination="synapses"/>
        <explicitInput target="sstPop/5/SST" input="baseline_sst" destination="synapses"/>
        <explicitInput target="sstPop/6/SST" input="baseline_sst" destination="synapses"/>
        <explicitInput target="sstPop/7/SST" input="baseline_sst" destination="synapses"/>
        <explicitInput target="sstPop/8/SST" input="baseline_sst" destination="synapses"/>
        <explicitInput target="sstPop/9/SST" input="baseline_sst" destination="synapses"/>
        <explicitInput target="sstPop/10/SST" input="baseline_sst" destination="synapses"/>
        <explicitInput target="sstPop/11/SST" input="baseline_sst" destination="synapses"/>
        <explicitInput target="vipPop/0/VIP" input="baseline_vip" destination="synapses"/>
        <explicitInput target="vipPop/0/VIP" input="modVIP" destination="synapses"/>
        <explicitInput target="vipPop/1/VIP" input="baseline_vip" destination="synapses"/>
        <explicitInput target="vipPop/1/VIP" input="modVIP" destination="synapses"/>
        <explicitInput target="vipPop/2/VIP" input="baseline_vip" destination="synapses"/>
        <explicitInput target="vipPop/2/VIP" input="modVIP" destination="synapses"/>
        <explicitInput target="vipPop/3/VIP" input="baseline_vip" destination="synapses"/>
        <explicitInput target="vipPop/3/VIP" input="modVIP" destination="synapses"/>
        <explicitInput target="vipPop/4/VIP" input="baseline_vip" destination="synapses"/>
        <explicitInput target="vipPop/4/VIP" input="modVIP" destination="synapses"/>
        <explicitInput target="vipPop/5/VIP" input="baseline_vip" destination="synapses"/>
        <explicitInput target="vipPop/5/VIP" input="modVIP" destination="synapses"/>
        <explicitInput target="vipPop/6/VIP" input="baseline_vip" destination="synapses"/>
        <explicitInput target="vipPop/6/VIP" input="modVIP" destination="synapses"/>
        <explicitInput target="vipPop/7/VIP" input="baseline_vip" destination="synapses"/>
        <explicitInput target="vipPop/7/VIP" input="modVIP" destination="synapses"/>
        <explicitInput target="vipPop/8/VIP" input="baseline_vip" destination="synapses"/>
        <explicitInput target="vipPop/8/VIP" input="modVIP" destination="synapses"/>
        <explicitInput target="vipPop/9/VIP" input="baseline_vip" destination="synapses"/>
        <explicitInput target="vipPop/9/VIP" input="modVIP" destination="synapses"/>
        <explicitInput target="vipPop/10/VIP" input="baseline_vip" destination="synapses"/>
        <explicitInput target="vipPop/10/VIP" input="modVIP" destination="synapses"/>
        <explicitInput target="vipPop/11/VIP" input="baseline_vip" destination="synapses"/>
        <explicitInput target="vipPop/11/VIP" input="modVIP" destination="synapses"/>
    </network>
</neuroml>
